OpenVSP model (file version 4), 5 components.
Geometry view with OpenVSP parameter names; values to 6 digits, angles in degrees, lengths in the model's unit.
Overall bounding box: X_Min=1.97532 X_Len=1389.27 Y_Min=-898.986 Y_Len=1797.97 Z_Min=-74.9596 Z_Len=239.524

Wing "HorizTail"
  location (X Y Z) 1300 0 160, rotation 0 0 0
  symmetric about XZ
  bounding box size 91.25 640 9.12791
  totals: TotalSpan=640 TotalProjectedSpan=640 TotalChord=77.5375 TotalArea=46333 TotalAR=8.84035
  root: chord 91.25, twist 0, NACA 4-series Camber=0 CamberLoc=0.2 ThickChord=0.1
  sections:
    n  Span  Root_Chord  Tip_Chord  Area     Sweep   Sweep_Location  Dihedral  Twist  Twist_Location  tip airfoil
    1  100   91.25       91.25      9125     0       0               0         0      0.25            as above
    2  220   91.25       36.4       14041.5  8.6321  0               0         0      0.25            as above
  SS_Control "elev": UStart=0 UEnd=1 Length_C_Start=0.33107 Length_C_End=0.240609 Length_Start=30.2102 Length_End=8.75818 LE_Flag=0 Surf_Type=2

WireFrame "VertTail_0"
  location (X Y Z) 0 0 0, rotation 0 0 0
  WireFrame: ISkipEnd=0 ISkipStart=0 IStartPatchType=0 IStride=2 JSkipEnd=0 JSkipStart=0 JStride=2 WireType=0
  Wireframe: FlipIJFlag=0 InvertFlag=0 RevIFlag=0 RevJFlag=0

WireFrame "VertTail_1"
  location (X Y Z) 0 0 0, rotation 0 0 0
  WireFrame: ISkipEnd=0 ISkipStart=0 IStartPatchType=0 IStride=2 JSkipEnd=0 JSkipStart=0 JStride=2 WireType=0
  Wireframe: FlipIJFlag=0 InvertFlag=1 RevIFlag=0 RevJFlag=0

Wing "Wing"
  location (X Y Z) 679.12 0 -44.3169, rotation 0 0 0
  symmetric about XZ
  bounding box size 180.654 1797.97 52.9707
  totals: TotalSpan=1800 TotalProjectedSpan=1797.97 TotalChord=144.45 TotalArea=209400 TotalAR=15.4379
  root: chord 180.6, twist 0, airfoil file "D8 WING"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 ThickChord=0.1
  sections:
    n  Span  Root_Chord  Tip_Chord  Area   Sweep    Sweep_Location  Dihedral  Twist  Twist_Location  tip airfoil
    1  100   180.6       180.6      18060  0        0               0         -0.6   0.25            as above
    2  800   180.6       36         86640  9.27554  0               2.885     -0.6   0.25            as above
  SS_Control "cs1": UStart=0.5 UEnd=0.54167 Length_C_Start=0.25 Length_C_End=0.25 Length_Start=45.1662 Length_End=39.1386 LE_Flag=0 Surf_Type=2
  SS_Control "cs2": UStart=0.54167 UEnd=0.58333 Length_C_Start=0.25 Length_C_End=0.25 Length_Start=39.1386 Length_End=33.1124 LE_Flag=0 Surf_Type=2
  SS_Control "cs3": UStart=0.58333 UEnd=0.625 Length_C_Start=0.25 Length_C_End=0.25 Length_Start=33.1124 Length_End=27.0847 LE_Flag=0 Surf_Type=2
  SS_Control "cs4": UStart=0.625 UEnd=0.66666 Length_C_Start=0.25 Length_C_End=0.25 Length_Start=27.0847 Length_End=21.0585 LE_Flag=0 Surf_Type=2
  SS_Control "cs5": UStart=0.66666 UEnd=0.70833 Length_C_Start=0.25 Length_C_End=0.25 Length_Start=21.0585 Length_End=15.0309 LE_Flag=0 Surf_Type=2
  SS_Control "cs6": UStart=0.70833 UEnd=1 Length_C_Start=0.25 Length_C_End=0.25 Length_Start=15.0309 Length_End=9.00323 LE_Flag=0 Surf_Type=2

WireFrame "Fuse"
  location (X Y Z) 0 0 0, rotation 0 0 0
  WireFrame: ISkipEnd=0 ISkipStart=0 IStartPatchType=0 IStride=2 JSkipEnd=0 JSkipStart=0 JStride=1 WireType=1
  Wireframe: FlipIJFlag=0 InvertFlag=1 RevIFlag=0 RevJFlag=0
